<?xml version="1.0" encoding="UTF-8"?>

<channelml xmlns="http://morphml.org/channelml/schema"
    xmlns:xsi="http://www.w3.org/2001/XMLSchema-instance"
    xmlns:meta="http://morphml.org/metadata/schema"
    xsi:schemaLocation="http://morphml.org/channelml/schema  ../../Schemata/v1.5/Level2/ChannelML_v1.5.xsd"
    units="Physiological Units">

    <meta:notes>ChannelML file containing a single Channel description</meta:notes>

    <ion name="na" charge="1" default_erev="50"/>  <!-- phys units: mV -->

    <channel_type name="NaConduction" density="yes">

        <meta:notes>Example showing a channel with different Q10 adjustments for each gate, based on HH Na example</meta:notes>

        <current_voltage_relation>
            <ohmic ion="na">
                <conductance default_gmax="120"> <!-- phys units: mS/cm2 -->

                    <rate_adjustments>
                        <q10_settings gate="m" q10_factor="3" experimental_temp="17"/>
                        <q10_settings gate="h" q10_factor="3.5" experimental_temp="17"/>
                    </rate_adjustments>

                    <gate power="3">
                        <state name="m" fraction="1"/>
                    </gate>
                    <gate power="1">
                        <state name="h" fraction="1"/>
                    </gate>
                </conductance>
            </ohmic>
        </current_voltage_relation>

        <hh_gate state="m">
            <transition>
                <voltage_gate>
                    <alpha>
                        <parameterised_hh type="linoid" expr="A*(k*(v-d))/(1 - exp(-(k*(v-d))))">
                            <parameter name="A" value="1"/>
                            <parameter name="k" value="0.1"/>
                            <parameter name="d" value="-40"/>
                        </parameterised_hh>
                    </alpha>
                    <beta>
                        <parameterised_hh type="exponential" expr="A*exp(k*(v-d))">
                            <parameter name="A" value="4"/>
                            <parameter name="k" value="-0.0555555555"/>
                            <parameter name="d" value="-65"/>
                        </parameterised_hh>
                    </beta>
                </voltage_gate>
            </transition>
        </hh_gate>

        <hh_gate state="h">
            <transition>
                <voltage_gate>
                    <alpha>
                        <parameterised_hh type="exponential" expr="A*exp(k*(v-d))">
                            <parameter name="A" value="0.07"/>
                            <parameter name="k" value="-0.05"/>
                            <parameter name="d" value="-65"/>
                        </parameterised_hh>
                    </alpha>
                    <beta>
                        <parameterised_hh type="sigmoid" expr="A/(1 + exp(-k*(d-v)))">
                            <parameter name="A" value="1"/>
                            <parameter name="k" value="-0.1"/>
                            <parameter name="d" value="-35"/>
                        </parameterised_hh>
                    </beta>
                </voltage_gate>
            </transition>
        </hh_gate>

    </channel_type>
</channelml>
