<?xml version="1.0" encoding="UTF-8"?>

<!--
  NEURON version="5.9">
-->

<neuroml xmlns="http://morphml.org/neuroml/schema"
    xmlns:mml="http://morphml.org/morphml/schema"
    xmlns:meta="http://morphml.org/metadata/schema"
    xmlns:bio="http://morphml.org/biophysics/schema"
    xmlns:cml="http://morphml.org/channelml/schema"
    xmlns:xsi="http://www.w3.org/2001/XMLSchema-instance"
    xsi:schemaLocation="http://morphml.org/neuroml/schema ../../Schemata/v1.2/Level2/NeuroML_v1.2.xsd"
    name = "Test"
    lengthUnits="micron">

<!-- ./ri04NEURON.xml -->
<!-- XML file generated by NEURON 5.9 ModelViewer -->
<!-- Authors: Michael Hines and Sushil Kambampati -->
<!-- Yale University -->
<!-- Date: Sun Apr 13 15:06:23 BST 2008 -->
<morphml>
<cells>
<cell name="soma[0]">
  <segments>
    <segment id="1" name = "Seg0_soma[0]" cable = "0">
      <proximal x="4.4" y="-1.674" z="0" diameter="12.846"/>
      <distal x="4.4" y="-0.837" z="0" diameter="12.306"/>
    </segment>
    <segment id="2" name = "Seg1_soma[0]" parent="1" cable = "0">
      <distal x="4.4" y="-0.208" z="0" diameter="12.074"/>
    </segment>
    <segment id="3" name = "Seg2_soma[0]" parent="2" cable = "0">
      <distal x="4.4" y="0.56" z="0" diameter="11.672"/>
    </segment>
    <segment id="4" name = "Seg3_soma[0]" parent="3" cable = "0">
      <distal x="4.4" y="1.141" z="0" diameter="11.478"/>
    </segment>
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  </segments>
  <cables>
    <cable id = "0" name = "soma[0]">
    </cable>
    <cable id = "1" name = "soma[1]">
    </cable>
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  </cables>
</cell>
</cells>
</morphml>
<biophysics>
<cell name="soma[0]">
  <mechanism name="Ra">
    <parameter name="" value="35.4">
      <subset name="ModelViewParmSubset[0]"/>
    </parameter>
  </mechanism>
  <mechanism name="capacitance">
    <parameter name="cm" value="1">
      <subset name="ModelViewParmSubset[0]"/>
    </parameter>
  </mechanism>
</cell>
</biophysics>
</neuroml>
